<Lems>

<!--
Definitions from PyNN for Brian:

class IF_curr_alpha(cells.IF_curr_alpha):

    __doc__ = cells.IF_curr_alpha.__doc__

    translations = build_translations(
        ('v_rest',     'v_rest',     mV),
        ('v_reset',    'v_reset'),
        ('cm',         'c_m',        nF),
        ('tau_m',      'tau_m',      ms),
        ('tau_refrac', 'tau_refrac'),
        ('tau_syn_E',  'tau_syn_E',  ms),
        ('tau_syn_I',  'tau_syn_I',  ms),
        ('v_thresh',   'v_thresh'),
        ('i_offset',   'i_offset',   nA),
    )
    eqs= brian.Equations('''
        dv/dt  = (ge + gi + i_offset + i_inj)/c_m + (v_rest-v)/tau_m : mV
        dge/dt = (2.7182818284590451*ye-ge)/tau_syn_E : nA
        dye/dt = -ye/tau_syn_E                        : nA
        dgi/dt = (2.7182818284590451*yi-gi)/tau_syn_I : nA
        dyi/dt = -yi/tau_syn_I                        : nA
        c_m                                   : nF
        tau_syn_E                             : ms
        tau_syn_I                             : ms
        tau_m                                 : ms
        v_rest                                : mV
        i_offset                              : nA
        i_inj                                 : nA
        '''
        )
    synapses  = {'excitatory' : 'ye', 'inhibitory' : 'yi'}

 -->

<Target component="simset"/>

<Dimension name="voltage" m="1" l="2" t="-3" i="-1"/>
<Dimension name="time" t="1"/>
<Dimension name="per_time" t="-1"/>
<Dimension name="conductance" m="-1" l="-2" t="3" i="2"/>
<Dimension name="capacitance" m="-1" l="-2" t="4" i="2"/>
<Dimension name="current" i="1"/>

<ComponentType name="iaf1">
	<Parameter name="threshold" dimension="voltage"/>
	<Parameter name="refractoryPeriod" dimension="time"/>
	<Parameter name="capacitance" dimension="capacitance"/>
	<Parameter name="reset" dimension="voltage"/>
</ComponentType>

<Unit symbol="mV" dimension="voltage" power="-3"/>
<Unit symbol="ms" dimension="time" power="-3"/>
<Unit symbol="pS" dimension="conductance" power="-12"/>
<Unit symbol="nS" dimension="conductance" power="-9"/>
<Unit symbol="uF" dimension="capacitance" power="-6"/>
<Unit symbol="nF" dimension="capacitance" power="-9"/>
<Unit symbol="pF" dimension="capacitance" power="-12"/>
<Unit symbol="per_ms" dimension="per_time" power="3"/>
<Unit symbol="pA" dimension="current" power="-12"/>

<ComponentType name="iafcondalpha">
	  <Parameter name="capacitance" dimension="capacitance"/>
	  <Parameter name="timeConstant" dimension="time"/>
	  <Parameter name="excitatoryTimeConstant" dimension="time"/>
	  <Parameter name="inhibitoryTimeConstant" dimension="time"/>
	  <Parameter name="reset" dimension="voltage"/>
	  <Parameter name="rest" dimension="voltage"/>
	  <Parameter name="offsetCurrent" dimension="current"/>
	  <Parameter name="injectionCurrent" dimension="current"/>

	  <ReceivePort name="excitatory-in"/>
	  <ReceivePort name="inhibitory-in"/>
      <SendPort name="spikes-out"/>
      <Exposure name="v" dimension="voltage"/>

      <Dynamics>
       <StateVariable name="v" exposure="v" dimension="voltage"/>
       <TimeDerivative variable="v" value="leakConductance * (leakReversal - v) / capacitance"/>

       <OnEvent port="spikes-in">
            <StateAssignment variable="v" value="v + deltaV"/>
       </OnEvent>

		<OnCondition test="v .gt. threshold">
			<EventOut port="spikes-out"/>
			 <StateAssignment variable="v" value="reset"/>
		</OnCondition>

    </Dynamics>

</ComponentType>

<ComponentType name="iaf3" extends="iaf1">
    <Parameter name="leakConductance" dimension="conductance"/>
    <Parameter name="leakReversal" dimension="voltage"/>
    <Parameter name="deltaV" dimension="voltage"/>

    <ReceivePort name="spikes-in"/>
    <SendPort name="spikes-out"/>
    <Exposure name="v" dimension="voltage"/>

    <Dynamics>
       <StateVariable name="v" exposure="v" dimension="voltage"/>
       <TimeDerivative variable="v" value="leakConductance * (leakReversal - v) / capacitance"/>

       <OnEvent port="spikes-in">
            <StateAssignment variable="v" value="v + deltaV"/>
       </OnEvent>

		<OnCondition test="v .gt. threshold">
			<EventOut port="spikes-out"/>
			 <StateAssignment variable="v" value="reset"/>
		</OnCondition>

    </Dynamics>

</ComponentType>

<ComponentType name="spikeGenerator">
    <Parameter name="period" dimension="time"/>
    <SendPort name="a"/>
    <Exposure name="tsince" dimension="time"/>
    <Dynamics>
        <StateVariable name="tsince" exposure="tsince" dimension="time"/>
        <TimeDerivative variable="tsince" value="1"/>
        <OnCondition test="tsince .gt. period">
            <StateAssignment variable="tsince" value="0"/>
            <EventOut port="a"/>
        </OnCondition>
    </Dynamics>
</ComponentType>

<ComponentType name="spikeGenerator1" extends="spikeGenerator">
	<Dynamics>
		<Super/>
	</Dynamics>
</ComponentType>

<ComponentType name="spikeGenerator2" extends="spikeGenerator">
    <Dynamics>
        <StateVariable name="tlast" dimension="time"/>
        <DerivedVariable name="tsince" exposure="tsince" value="t - tlast"/>
        <OnCondition test="t - tlast .gt. period">
            <StateAssignment variable="tlast" value="t"/>
            <EventOut port="a"/>
        </OnCondition>
    </Dynamics>
</ComponentType>

<Component id="celltype_c" type="iaf3" leakConductance="3 pS"
	refractoryPeriod="3 ms" threshold="45 mV"
	leakReversal="-50 mV" deltaV="5mV" capacitance="1uF" reset="-70mV"/>

<Component id="celltype_d" extends="celltype_c" leakConductance="5 pS"/>

<Component id="gen1" type="spikeGenerator1" period="5ms"/>

<Component id="gen2" type="spikeGenerator2" period="32ms"/>

<Component id="iaf3cpt" type="iaf3" leakReversal="-60mV" deltaV="5mV"
	threshold="-30mV" leakConductance="5pS"
	refractoryPeriod="4ms" capacitance="1pF" reset="-70mV"/>

<Include file="SimpleNetwork.xml"/>

<Network id="net1">
    <Population id="p1" component="gen1" size="1"/>
    <Population id="p3" component="iaf3cpt" size="1"/>

    <EventConnectivity id="p1-p3" source="p1" target="p3">
        <Connections type="AllAll"/>
    </EventConnectivity>
</Network>

<Include file="MultiRunSimulation.xml"/>

<SimulationSet id="simset">
	<Display id="disp1" title="Example1" xmin="0" xmax="80" ymin="-80" ymax="50"/>

	<Simulation id="sim1" length="80ms" step="0.05ms" target="net1" display="disp1">
    	<DisplayList timeScale="1ms" title="Example 1: Dimensions, Units, ComponentTypes and Components">
        	<Line id="tsince" quantity="p1[0]/tsince" scale="1ms" timeScale="1ms" color="#00c000"/>
        	<Line id="p3v" quantity="p3[0]/v" scale="1mV" timeScale="1ms" color="#0000f0"/>
    	</DisplayList>
	</Simulation>
</SimulationSet>

</Lems>
